// SBML level 2 version 3

model temp()

  // Compartments:
  compartment cell = 1;

  // Species:
  species TGFb_r in cell = TGFb_0; TGFb_r is "TGFb(r)";
  species IL6_r in cell = IL6_0; IL6_r is "IL6(r)";
  species S3 in cell = IL6R_0; S3 is "IL6R(activity~I,l_bind,stat3_site)";
  species S4 in cell = TGFbR_0; S4 is "TGFbR(activity~I,l_bind,smad3_site)";
  species S5 in cell = SMAD3_0; S5 is "SMAD3(phos~U,pka_site,smad4_site,stat3_site,tgfbr_site)";
  species SMAD4_s3_site in cell = SMAD4_0; SMAD4_s3_site is "SMAD4(s3_site)";
  species STAT3m_il6r_site_phos_U in cell = STAT3m_0; STAT3m_il6r_site_phos_U is "STAT3m(il6r_site,phos~U)";
  species PKA_activity_I_s3s4_site in cell = PKA_0; PKA_activity_I_s3s4_site is "PKA(activity~I,s3s4_site)";
  species S9 in cell = 0; S9 is "IL6(r!1).IL6R(activity~I,l_bind!1,stat3_site)";
  species S10 in cell = 0; S10 is "TGFb(r!1).TGFbR(activity~I,l_bind!1,smad3_site)";
  species S11 in cell = 0; S11 is "IL6(r!1).IL6R(activity~A,l_bind!1,stat3_site)";
  species S12 in cell = 0; S12 is "TGFb(r!1).TGFbR(activity~A,l_bind!1,smad3_site)";
  species S13 in cell = 0; S13 is "SMAD3(phos~U,pka_site,smad4_site,stat3_site,tgfbr_site!1).TGFb(r!2).TGFbR(activity~A,l_bind!2,smad3_site!1)";
  species S14 in cell = 0; S14 is "IL6(r!1).IL6R(activity~A,l_bind!1,stat3_site!2).STAT3m(il6r_site!2,phos~U)";
  species S15 in cell = 0; S15 is "SMAD3(phos~P,pka_site,smad4_site,stat3_site,tgfbr_site)";
  species STAT3m_il6r_site_phos_P in cell = 0; STAT3m_il6r_site_phos_P is "STAT3m(il6r_site,phos~P)";
  species STAT3d_active_s3_site in cell = 0; STAT3d_active_s3_site is "STAT3d_active(s3_site)";
  species S18 in cell = 0; S18 is "SMAD3(phos~P,pka_site,smad4_site!1,stat3_site,tgfbr_site).SMAD4(s3_site!1)";
  species S19 in cell = 0; S19 is "SMAD3(phos~P,pka_site,smad4_site,stat3_site!1,tgfbr_site).STAT3d_active(s3_site!1)";
  species S20 in cell = 0; S20 is "PKA(activity~A,s3s4_site!1).SMAD3(phos~P,pka_site!1,smad4_site!2,stat3_site,tgfbr_site).SMAD4(s3_site!2)";

  // Parameters:
  TGFb_0 = 1;
  IL6_0 = 0;
  kf_il6_bind = 0.3;
  kr_il6_bind = 0.05;
  k_act_il6r = 3;
  k_deact_il6r = 0.01;
  kf_tgfb_bind = 0.05;
  kr_tgfb_bind = 0.2;
  k_act_tgfbr = 0.8;
  k_deact_tgfbr = 0.02;
  k_phos_smad3 = 0.03;
  k_dephos_smad3 = 0.02;
  kf_stat3_bind = 0.12;
  Kd_stat3_bind = 0.08;
  k_phos_stat3 = 0.15;
  kf_dimer = 0.5;
  Kd_dimer = 0.6;
  k_dephos_stat3d = 0.06;
  kf_smad3_bind = 0.08;
  Kd_smad3_bind = 0.12;
  kf_s3s4 = 0.6;
  Kd_s3s4 = 0.2;
  kf_s3stat3d = 2;
  Kd_s3stat3d = 0.05;
  kf_pka_bind = 1;
  Kd_pka_bind = 0.1;
  IL6R_0 = 250;
  TGFbR_0 = 40;
  SMAD3_0 = 60;
  SMAD4_0 = 30;
  STAT3m_0 = 220;
  PKA_0 = 50;
  _rateLaw1 = kf_smad3_bind*Kd_smad3_bind;
  _rateLaw2 = kf_stat3_bind*Kd_stat3_bind;
  _rateLaw3 = kf_dimer*Kd_dimer;
  _rateLaw4 = kf_s3s4*Kd_s3s4;
  _rateLaw5 = kf_s3stat3d*Kd_s3stat3d;
  _rateLaw6 = kf_pka_bind*Kd_pka_bind;

  // Assignment rules:
  Free_IL6_obs := 0 + IL6_r;
  Free_TGFb_obs := 0 + TGFb_r;
  IL6R_Active := S11 + S14;
  TGFbR_Active := S12 + S13;
  pSMAD3_obs := S15 + S18 + S19 + S20;
  pSTAT3_obs := 0 + STAT3m_il6r_site_phos_P;
  STAT3d_active_obs := STAT3d_active_s3_site + S19;
  S3S4_complex_obs := S18 + S20;
  S3STAT3d_complex_obs := 0 + S19;
  PKA_active := 0 + S20;

  // Reactions:
  R1: IL6_r + S3 => S9; kf_il6_bind*IL6_r*S3;
  R2: TGFb_r + S4 => S10; kf_tgfb_bind*TGFb_r*S4;
  R3: S9 => IL6_r + S3; kr_il6_bind*S9;
  R4: S9 => S11; k_act_il6r*S9;
  R5: S10 => TGFb_r + S4; kr_tgfb_bind*S10;
  R6: S10 => S12; k_act_tgfbr*S10;
  R7: S11 => IL6_r + S3; k_deact_il6r*S11;
  R8: S12 => TGFb_r + S4; k_deact_tgfbr*S12;
  R9: S5 + S12 => S13; kf_smad3_bind*S5*S12;
  R10: STAT3m_il6r_site_phos_U + S11 => S14; kf_stat3_bind*STAT3m_il6r_site_phos_U*S11;
  R11: S14 => IL6_r + S3 + STAT3m_il6r_site_phos_U; k_deact_il6r*S14;
  R12: S13 => TGFb_r + S4 + S5; k_deact_tgfbr*S13;
  R13: S13 => S5 + S12; _rateLaw1*S13;
  R14: S13 => S12 + S15; k_phos_smad3*S13;
  R15: S14 => STAT3m_il6r_site_phos_U + S11; _rateLaw2*S14;
  R16: S14 => S11 + STAT3m_il6r_site_phos_P; k_phos_stat3*S14;
  R17: S15 => S5; k_dephos_smad3*S15;
  R18: STAT3m_il6r_site_phos_P + STAT3m_il6r_site_phos_P => STAT3d_active_s3_site; 0.5*kf_dimer*STAT3m_il6r_site_phos_P*STAT3m_il6r_site_phos_P;
  R19: SMAD4_s3_site + S15 => S18; kf_s3s4*SMAD4_s3_site*S15;
  R20: STAT3d_active_s3_site => STAT3m_il6r_site_phos_P + STAT3m_il6r_site_phos_P; _rateLaw3*STAT3d_active_s3_site;
  R21: STAT3d_active_s3_site => STAT3m_il6r_site_phos_U + STAT3m_il6r_site_phos_U; k_dephos_stat3d*STAT3d_active_s3_site;
  R22: S18 => SMAD4_s3_site + S15; _rateLaw4*S18;
  R23: S15 + STAT3d_active_s3_site => S19; kf_s3stat3d*S15*STAT3d_active_s3_site;
  R24: PKA_activity_I_s3s4_site + S18 => S20; kf_pka_bind*PKA_activity_I_s3s4_site*S18;
  R25: S19 => S15 + STAT3d_active_s3_site; _rateLaw5*S19;
  R26: S20 => PKA_activity_I_s3s4_site + S18; _rateLaw6*S20;

  // Unit definitions:
  unit substance = item;
end
